/* INPUTIMPLANTJOINT_IMPLANTNAME.ANY
Parameters to set implants and joint parameters:
- Implants names
- Implants positions (!!Must be calculated outside AnyBody!!)
- Humeral head (HH) implant position: transform matrix HH_CoordinateSystem to HumerusBoneGeometryNode
- Glenoid implant position: transform matrix Glenoid_CoordinateSystem to GlenImplantPos
- Glenoid center position to position gh joint node (ghProth) (calculated by fitting a sphere on the glenoid implant surface)

NB: this file is a template:
- It should not be modified
- It should be duplicated and new file should be saved with the real implants names to replace "ImplantName"
*/

/* -------- IMPLANTS --------
Names and positions of humeral head and glenoid components
GH joint position (depends on the chosen implants !)
----------------------------- */
AnyFolder &InputVar1=Main.InputVariables;

InputVar1={
  AnyFolder ImplantParameters = {

    // FILENAMES
    // Be sure that STL Models are in the folder "..\Body\STLModels\ImplantModels"
    // If in subfolder, specify subfolder names
    AnyFolder ImplantNames = {
      AnyString HumerusName = "Tete";
      AnyString GlenoidName = "Glene";
    };

    // HUMERAL IMPLANT POSITION/ORIENTATION
    // From HumerusBoneGeometryNode to the humeral head component Coordinate System (on 3d model)
    AnyFolder HumPosition = {
      AnyVec3 Position = 0.001*{0,0,0};
      AnyMat33 Rotation = {
        {1, 0, 0},
        {0, 1, 0},
        {0, 0, 1}
      };
    };

    // GLENOID IMPLANT POSITION/ORIENTATION
    // From Scapula to glenoid component Coordinate System (on 3d model)
    AnyFolder GlenPosition = {
      AnyVec3 Position = 0.001*{0,0,0};
      AnyMat33 Rotation = {
        {1, 0, 0},
        {0, 1, 0},
        {0, 0, 1}
      };

      // GLENOID IMPLANT CENTER (CALCULATED BY FITTING A SPHERE ON THE GLENOID SURFACE)
      // In glenoid coordinate system
      AnyVec3 Center_Local =  0.001*{0,0,0};

      // In scapula coordinate system with the neutral rotation
      AnyVec3 Center_Neutral = {0,0,0};


      //New Center after glene implant rotation in scapula coordinate system
      AnyVec3 Center_Absolute = 0.001* {0,0,0};

    };
  };

  // GH JOINT POSITION
  // To adjust to have small contact between humeral head and glenoid components after the "InitialCondition" step
  AnyFolder JointPosition = {
    AnyVar px =0.0;     //AP : Anterieur = +
    AnyVar py =0.0;     //IS : Superieur = +
    AnyVar pz =0.0;     //ML : Lateral = +
  };

};
