/* INPUTIMPLANTJOINT_INTERFACE.ANY
Parameters to set implants and joint parameters:
  - Implants names
  - Implants positions (!!Must be calculated outside AnyBody!!). cf "Seg.any" for more information
      - Humeral head (HH) implant position: transform matrix HH_CoordinateSystem to HumerusBoneGeometryNode
      - Glenoid (HH) implant position: transform matrix Glenoid_CoordinateSystem to GlenImplantPos

NB: Same file than InputImplantJoint_ImplantName.any,
    except the implant names already set to "Tete" and "Glene"
    To be used with the AppEpaule software
*/

/* -------- IMPLANTS --------
Names and positions of humeral head and glenoid components
GH joint position (depends on the chosen implants !)
----------------------------- */
AnyFolder &InputVar1=Main.InputVariables;

InputVar1={
  AnyFolder ImplantParameters = {

    // FILENAMES
    // Be sure that STL Models are in the folder "..\Body\STLModels\ImplantModels"
    // If in subfolder, specify subfolder names
    AnyFolder ImplantNames = {
      AnyString HumerusName = "Tete";
      AnyString GlenoidName = "Glene";
    };

    // HUMERAL IMPLANT POSITION/ORIENTATION
    AnyFolder HumPosition = {
      AnyVec3 Position = 0.001*{0,0,0};
      AnyMat33 Rotation = {
        {1, 0, 0},
        {0, 1, 0},
        {0, 0, 1}
      };
    };

    // GLENOID IMPLANT POSITION/ORIENTATION
    AnyFolder GlenPosition = {
      AnyVec3 Position = 0.001*{0,0,0};
      AnyMat33 Rotation = {
        {1, 0, 0},
        {0, 1, 0},
        {0, 0, 1}
      };
    };
  };

  // GH JOINT POSITION
  AnyFolder JointPosition = {
    AnyVar px =0.0;     //AP : Anterieur = +
    AnyVar py =0.0;     //IS : Superieur = +
    AnyVar pz =0.0;     //ML : Lateral = +
  };

};
