#path __BM_PLUGIN_FILE__ "BodyModelSettings.any"
#define BM_CONFIG_PLUGIN __BM_PLUGIN_FILE__

// Configure the body model

// Settings for arms

#include "<ANYBODY_PATH_MODELUTILS>/Video/CameraClassTemplate.any"

#if LeftArmOn == 0
#define BM_ARM_LEFT OFF
#endif

#if LeftArmOn == 1
#define BM_ARM_LEFT ON
#endif


#define BM_ARM_SHOULDER_RHYTHM ON
#define BM_ARM_MUSCLES_RIGHT _MUSCLES_3E_HILL_


// Settings for legs
#define BM_LEG_LEFT OFF
#define BM_LEG_RIGHT OFF

// Settings for trunk
#define BM_TRUNK_MUSCLES CONST_MUSCLES_NONE

// Settings for mannequin

#path BM_MANNEQUIN_FILE "Mannequin.any"

//Drawsettings path
#path BM_DRAWSETTINGS_FILE "<ANYBODY_PATH_MAINFILEDIR>\Model\DrawSettings.any"


// Mannequin Drivers
// Enable/disable default mannequin drivers on all degrees of freedom
#define BM_MANNEQUIN_DRIVER_DEFAULT ON


// Switches off the mannequin GH drivers to make an abduction in the scapular plane
#if ArmMovement == Elevation
#define BM_MANNEQUIN_DRIVER_GLENOHUMERAL_ABDUCTION_RIGHT OFF
#define BM_MANNEQUIN_DRIVER_GLENOHUMERAL_FLEXION_RIGHT OFF
#define BM_MANNEQUIN_DRIVER_GLENOHUMERAL_EXTERNAL_ROTATION_RIGHT OFF
#endif

// Only switches off the mannequin abduction driver
#if ArmMovement == Abduction
#define BM_MANNEQUIN_DRIVER_GLENOHUMERAL_ABDUCTION_RIGHT OFF
#endif


#define BM_ARM_MUSCLES_LEFT _MUSCLES_3E_HILL_
