AnyFolder EnvironmentModel = {

  AnyFixedRefFrame GlobalRef = {
    Origin ={0,0,0};
//    #include "DrawCoorSystem.any"


//    AnyRefNode test = {
//    sRel = {-0.1128911, 0.5031109, 0.1692766};
//    ARel = {{0.8978917, -0.05781788, 0.436403},
//{-0.09634271, 0.9414962, 0.3229598},
//{-0.4295446, -0.3320272, 0.8397913}};
//   AnyDrawRefFrame drw = {Visible=On; RGB={1, 0, 0}; ScaleXYZ = {0.05,0.05,0.05};};
//
//    };

  };//GlobalRef


};
