AnyFolder EvaluateMomentArms = {

  AnyFolder &Mus=Main.HumanModel.BodyModel.Right.ShoulderArm.Mus;

  // Formule pour calculer la vitesse du driver,
  // Me pas referencer le driver directement sinon lors du load ferait division par 0
  // Mettre la meme formule que celle mise dans la vitesse angulaire du driver d'abduction dans AngularVelocity

  //AnyVar AngularVelocity = (120/4)/180*pi;

//  Vitesses du driver fourier avec 70 steps
  AnyVector FourierAngularVelocity = DesignVar({1.46888E-18,
    0.001091833,
    0.002181402,
    0.00326645,
    0.004344728,
    0.005414001,
    0.006472053,
    0.00751669,
    0.008545748,
    0.009557093,
    0.01054863,
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    1.46888E-18
  });


// Pour 90 steps
//AnyVector FourierAngularVelocity = DesignVar({1.46888E-18,
//                                       0.000846594,
//                                       0.001692132,
//                                       0.002535563,
//                                       0.003375835,
//                                       0.004211900,
//                                       0.005042719,
//                                       0.005867254,
//                                       0.006684480,
//                                       0.007493378,
//                                       0.008292940,
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//                                       1.46888E-18});

  AnyVar AngularVelocity = FourierAngularVelocity[Main.Study.iStep];

  #define _CODE_MACRO_(name) \
  // Creation de la variable MomentArm dans le dossier du muscle
  Mus.name = {AnyVar MomentArm = -1 * LmtDot/..AngularVelocity;}; \
  // Creation d'un dossier qui stocke aussi les MomentArm de chaque muscle
  AnyVar name = -1 * Mus.name.LmtDot/AngularVelocity;
  #include  "ArmMuscleList.any"

};
