AnyFolder Drivers =
{


    // Aliases for convenient referencing
  AnyFolder &JntPos=...HumanModel.Mannequin.Posture;
  AnyFolder &JntVel=...HumanModel.Mannequin.PostureVel;

  AnyFolder &Thorax = ..BodyModel.Trunk.SegmentsThorax.ThoraxSeg;
  AnyFolder &ref=Main.Model.BodyModel.Trunk;


  AnyVar startangle = 15;
  AnyVar endangle = 120;


  AnyKinEqFourierDriver AbductionDriverRight={
    AnyKinMeasureOrg &ref1 =...BodyModel.Interface.Right.GlenohumeralAbduction;
    Type = Sin;

    AnyVar w = pi/Main.Study.tEnd;
    Freq = w/(2*pi) ;
    A = { {(.startangle+.endangle)/2, (.endangle-.startangle)/2}*pi/180 };
    B = { {pi/2, -pi/2} };
    Reaction.Type = {Off};
  };

    AnyKinEqSimpleDriver GHDriverRight={
    //    AnyKinMeasure& ref1 =...BodyModel.Interface.Right.GlenohumeralAbduction;
    //    AnyKinMeasure& ref2 =...BodyModel.Interface.Right.GlenohumeralFlexion;
    AnyKinMeasure& ref3 =...BodyModel.Interface.Right.GlenohumeralExternalRotation;

    DriverPos=pi/180*{
      //      .JntPos.Right.GlenohumeralAbduction,  //GH joint
      //      .JntPos.Right.GlenohumeralFlexion,  //GH joint
      .JntPos.Right.GlenohumeralExternalRotation  //GH joint
    };
    DriverVel = pi/180*{
      //      .JntVel.Right.GlenohumeralAbduction,  //GH joint
      //      .JntVel.Right.GlenohumeralFlexion,  //GH joint
      .JntVel.Right.GlenohumeralExternalRotation  //GH joint
    };
    Reaction.Type={Off};
  };


};//Drivers
