// Hides the muscles that will be redefined


Main.HumanModel.BodyModel.Right.ShoulderArm.Mus.deltoideus_lateral_part_1.DrwMus.Visible =Off;
Main.HumanModel.BodyModel.Right.ShoulderArm.Mus.deltoideus_lateral_part_2.DrwMus.Visible =Off;
Main.HumanModel.BodyModel.Right.ShoulderArm.Mus.deltoideus_lateral_part_3.DrwMus.Visible =Off;
Main.HumanModel.BodyModel.Right.ShoulderArm.Mus.deltoideus_lateral_part_4.DrwMus.Visible =Off;

// MuscleModel of the muscles that will be redifined. It's the exact copy of the original AMMR Code
// Values found in "Muscle-parameters-shoulder.any" and in "Muscle-parameters-shoulder-const"
Main.HumanModel.BodyModel.Right.ShoulderArm.MusPar = {

AnyMuscleModel3E My_deltoideus_lateral_part_1 = {

  AnyVar PCSA = .deltoideus_lateral_part_1.PCSA;
  F0 = .deltoideus_lateral_part_1.F0;
  Lf0 = .deltoideus_lateral_part_1.Lf0;
  Lt0 = .deltoideus_lateral_part_1.Lt0;
  Gamma0 = .deltoideus_lateral_part_1.Gamma0;
  Epsilon0 = .deltoideus_lateral_part_1.Epsilon0;
  K1 = .deltoideus_lateral_part_1.K1;
  K2 = .deltoideus_lateral_part_1.K2;
  Fcfast = .deltoideus_lateral_part_1.Fcfast;
  Jt = .deltoideus_lateral_part_1.Jt;
  Jpe = .deltoideus_lateral_part_1.Jpe;
  PEFactor = .deltoideus_lateral_part_1.PEFactor;
};

AnyMuscleModel3E My_deltoideus_lateral_part_2 = {

  AnyVar PCSA = .deltoideus_lateral_part_2.PCSA;
  F0 = .deltoideus_lateral_part_2.F0;
  Lf0 = .deltoideus_lateral_part_2.Lf0;
  Lt0 = .deltoideus_lateral_part_2.Lt0;
  Gamma0 = .deltoideus_lateral_part_2.Gamma0;
  Epsilon0 = .deltoideus_lateral_part_2.Epsilon0;
  K1 = .deltoideus_lateral_part_2.K1;
  K2 = .deltoideus_lateral_part_2.K2;
  Fcfast = .deltoideus_lateral_part_2.Fcfast;
  Jt = .deltoideus_lateral_part_2.Jt;
  Jpe = .deltoideus_lateral_part_2.Jpe;
  PEFactor = .deltoideus_lateral_part_2.PEFactor;

};

AnyMuscleModel3E My_deltoideus_lateral_part_3 = {

  AnyVar PCSA = .deltoideus_lateral_part_3.PCSA;
  F0 = .deltoideus_lateral_part_3.F0;
  Lf0 = .deltoideus_lateral_part_3.Lf0;
  Lt0 = .deltoideus_lateral_part_3.Lt0;
  Gamma0 = .deltoideus_lateral_part_3.Gamma0;
  Epsilon0 = .deltoideus_lateral_part_3.Epsilon0;
  K1 = .deltoideus_lateral_part_3.K1;
  K2 = .deltoideus_lateral_part_3.K2;
  Fcfast = .deltoideus_lateral_part_3.Fcfast;
  Jt = .deltoideus_lateral_part_3.Jt;
  Jpe = .deltoideus_lateral_part_3.Jpe;
  PEFactor = .deltoideus_lateral_part_3.PEFactor;

};

AnyMuscleModel3E My_deltoideus_lateral_part_4 = {


  AnyVar PCSA = .deltoideus_lateral_part_4.PCSA;
  F0 = .deltoideus_lateral_part_4.F0;
  Lf0 = .deltoideus_lateral_part_4.Lf0;
  Lt0 = .deltoideus_lateral_part_4.Lt0;
  Gamma0 = .deltoideus_lateral_part_4.Gamma0;
  Epsilon0 = .deltoideus_lateral_part_4.Epsilon0;
  K1 = .deltoideus_lateral_part_4.K1;
  K2 = .deltoideus_lateral_part_4.K2;
  Fcfast = .deltoideus_lateral_part_4.Fcfast;
  Jt = .deltoideus_lateral_part_4.Jt;
  Jpe = .deltoideus_lateral_part_4.Jpe;
  PEFactor = .deltoideus_lateral_part_4.PEFactor;


};


AnyMuscleModel3E My_deltoideus_posterior_part_1 = {
  AnyVar PCSA = .deltoideus_posterior_part_1.PCSA;
  F0 = .deltoideus_posterior_part_1.F0;
  Lf0 = .deltoideus_posterior_part_1.Lf0;
  Lt0 = .deltoideus_posterior_part_1.Lt0;
  Gamma0 = .deltoideus_posterior_part_1.Gamma0;
  Epsilon0 = .deltoideus_posterior_part_1.Epsilon0;
  K1 = .deltoideus_posterior_part_1.K1;
  K2 = .deltoideus_posterior_part_1.K2;
  Fcfast = .deltoideus_posterior_part_1.Fcfast;
  Jt = .deltoideus_posterior_part_1.Jt;
  Jpe = .deltoideus_posterior_part_1.Jpe;
  PEFactor = .deltoideus_posterior_part_1.PEFactor;
};

AnyMuscleModel3E My_deltoideus_posterior_part_2 = {
  AnyVar PCSA = .deltoideus_posterior_part_2.PCSA;
  F0 = .deltoideus_posterior_part_2.F0;
  Lf0 = .deltoideus_posterior_part_2.Lf0;
  Lt0 = .deltoideus_posterior_part_2.Lt0;
  Gamma0 = .deltoideus_posterior_part_2.Gamma0;
  Epsilon0 = .deltoideus_posterior_part_2.Epsilon0;
  K1 = .deltoideus_posterior_part_2.K1;
  K2 = .deltoideus_posterior_part_2.K2;
  Fcfast = .deltoideus_posterior_part_2.Fcfast;
  Jt = .deltoideus_posterior_part_2.Jt;
  Jpe = .deltoideus_posterior_part_2.Jpe;
  PEFactor = .deltoideus_posterior_part_2.PEFactor;
};

AnyMuscleModel3E My_deltoideus_posterior_part_3 = {
  AnyVar PCSA = .deltoideus_posterior_part_3.PCSA;
  F0 = .deltoideus_posterior_part_3.F0;
  Lf0 = .deltoideus_posterior_part_3.Lf0;
  Lt0 = .deltoideus_posterior_part_3.Lt0;
  Gamma0 = .deltoideus_posterior_part_3.Gamma0;
  Epsilon0 = .deltoideus_posterior_part_3.Epsilon0;
  K1 = .deltoideus_posterior_part_3.K1;
  K2 = .deltoideus_posterior_part_3.K2;
  Fcfast = .deltoideus_posterior_part_3.Fcfast;
  Jt = .deltoideus_posterior_part_3.Jt;
  Jpe = .deltoideus_posterior_part_3.Jpe;
  PEFactor = .deltoideus_posterior_part_3.PEFactor;
};

AnyMuscleModel3E My_deltoideus_posterior_part_4 = {
  AnyVar PCSA = .deltoideus_posterior_part_4.PCSA;
  F0 = .deltoideus_posterior_part_4.F0;
  Lf0 = .deltoideus_posterior_part_4.Lf0;
  Lt0 = .deltoideus_posterior_part_4.Lt0;
  Gamma0 = .deltoideus_posterior_part_4.Gamma0;
  Epsilon0 = .deltoideus_posterior_part_4.Epsilon0;
  K1 = .deltoideus_posterior_part_4.K1;
  K2 = .deltoideus_posterior_part_4.K2;
  Fcfast = .deltoideus_posterior_part_4.Fcfast;
  Jt = .deltoideus_posterior_part_4.Jt;
  Jpe = .deltoideus_posterior_part_4.Jpe;
  PEFactor = .deltoideus_posterior_part_4.PEFactor;
};


};//MusPar


//For the new muscles definition, replaced : &MusMdl to My_muscle, DrwMus with a new path, &Surf to My_muscle and in InitWrapPos replaces muscle.BASE_FRAME with My_muscle.BASE_FRAME

// New deltoid lateral definition that are a copy of the original AMMR code

Main.HumanModel.BodyModel.Right.ShoulderArm.Mus = {

AnyMuscleShortestPath My_deltoideus_lateral_part_1 = {
  AnyMuscleModel &MusMdl = ..MusPar.My_deltoideus_lateral_part_1;
  AnyRefNode &Org = ..Seg.Scapula.O_deltoideus_lateral_part_1;

  AnyRefNode &Ins = ..Seg.Humerus.I_deltoideus_lateral_part_1;
  AnyDrawMuscle DrwMus = {#include "../../../../Body/AAUHuman/DrawSettings/MusDrawSettings.any"};
  SPLine.StringMesh = 30;

  AnyParamSurfAnalytical &Surf =.My_DeltoidWrappingLateral.BASE_FRAME.Wrapping_1.Surf;
  SPLine = {
    AnyMatrix InitWrapPos = {
         transf3D({0.8*.Surf.Sizes[0],0.8*.Surf.Sizes[0 ],0}, &..My_DeltoidWrappingLateral.BASE_FRAME.Wrapping_1.Center),
         transf3D({1.1*.Surf.Sizes[0],0,0},  &..My_DeltoidWrappingLateral.BASE_FRAME.Wrapping_1.Center),
         transf3D({0.8*.Surf.Sizes[0],-0.8*.Surf.Sizes[0],0}, &..My_DeltoidWrappingLateral.BASE_FRAME.Wrapping_1.Center)
    };
    InitWrapPosVecArr = {&InitWrapPos};
  };
};

AnyMuscleShortestPath My_deltoideus_lateral_part_3 = {
  AnyMuscleModel &MusMdl = ..MusPar.My_deltoideus_lateral_part_3;
  AnyRefNode &Org = ..Seg.Scapula.O_deltoideus_lateral_part_3;
  AnyRefNode &Ins = ..Seg.Humerus.I_deltoideus_lateral_part_3;
  AnyDrawMuscle DrwMus = {#include "../../../../Body/AAUHuman/DrawSettings/MusDrawSettings.any"};
  SPLine.StringMesh = 30;


  AnyParamSurfAnalytical &Surf =.My_DeltoidWrappingLateral.BASE_FRAME.Wrapping_3.Surf;

  SPLine = {
    AnyMatrix InitWrapPos = {
         transf3D({0.8*.Surf.Sizes[0],0.8*.Surf.Sizes[0 ],0}, &..My_DeltoidWrappingLateral.BASE_FRAME.Wrapping_2.Center),
         transf3D({1.1*.Surf.Sizes[0],0,0},  &..My_DeltoidWrappingLateral.BASE_FRAME.Wrapping_2.Center),
         transf3D({0.8*.Surf.Sizes[0],-0.8*.Surf.Sizes[0],0}, &..My_DeltoidWrappingLateral.BASE_FRAME.Wrapping_2.Center)
    };
    InitWrapPosVecArr = {&InitWrapPos};
  };
};

AnyMuscleShortestPath My_deltoideus_lateral_part_2 = {
  AnyMuscleModel &MusMdl = ..MusPar.My_deltoideus_lateral_part_2;
  AnyRefNode &Org = ..Seg.Scapula.O_deltoideus_lateral_part_2;
  AnyRefNode &Ins = ..Seg.Humerus.I_deltoideus_lateral_part_2;
  AnyDrawMuscle DrwMus = {#include "../../../../Body/AAUHuman/DrawSettings/MusDrawSettings.any"};
  SPLine.StringMesh = 30;
  AnyParamSurfAnalytical &Surf =.My_DeltoidWrappingLateral.BASE_FRAME.Wrapping_2.Surf;

  SPLine = {
    AnyMatrix InitWrapPos = {
         transf3D({0.8*.Surf.Sizes[0],0.8*.Surf.Sizes[0 ],0}, &..My_DeltoidWrappingLateral.BASE_FRAME.Wrapping_3.Center),
         transf3D({1.1*.Surf.Sizes[0],0,0},  &..My_DeltoidWrappingLateral.BASE_FRAME.Wrapping_3.Center),
         transf3D({0.8*.Surf.Sizes[0],-0.8*.Surf.Sizes[0],0}, &..My_DeltoidWrappingLateral.BASE_FRAME.Wrapping_3.Center)
    };
    InitWrapPosVecArr = {&InitWrapPos};
  };
};

AnyMuscleShortestPath My_deltoideus_lateral_part_4 = {
  AnyMuscleModel &MusMdl = ..MusPar.My_deltoideus_lateral_part_4;
  AnyRefNode &Org = ..Seg.Scapula.O_deltoideus_lateral_part_4;
  AnyRefNode &Ins = ..Seg.Humerus.I_deltoideus_lateral_part_4;
  AnyDrawMuscle DrwMus = {#include "../../../../Body/AAUHuman/DrawSettings/MusDrawSettings.any"};
  SPLine.StringMesh = 30;


  AnyParamSurfAnalytical &Surf =.My_DeltoidWrappingLateral.BASE_FRAME.Wrapping_4.Surf;
  SPLine = {
    AnyMatrix InitWrapPos = {
         transf3D({0.8*.Surf.Sizes[0],0.8*.Surf.Sizes[0 ],0}, &..My_DeltoidWrappingLateral.BASE_FRAME.Wrapping_4.Center),
         transf3D({1.1*.Surf.Sizes[0],0,0},  &..My_DeltoidWrappingLateral.BASE_FRAME.Wrapping_4.Center),
         transf3D({0.8*.Surf.Sizes[0],-0.8*.Surf.Sizes[0],0}, &..My_DeltoidWrappingLateral.BASE_FRAME.Wrapping_4.Center)
    };
    InitWrapPosVecArr = {&InitWrapPos};
  };
};


//deltoideus Posterior
AnyMuscleShortestPath My_deltoideus_posterior_part_1 = {
  AnyMuscleModel &MusMdl = ..MusPar.My_deltoideus_posterior_part_1;
  AnyRefNode &Org = ..Seg.Scapula.O_deltoideus_posterior_part_1;
  AnyRefNode &Ins = ..Seg.Humerus.I_deltoideus_posterior_part_1;
  AnyDrawMuscle DrwMus = {
    #include "../../../../Body/AAUHuman/DrawSettings/MusDrawSettings.any"
  };
  SPLine.StringMesh = 50;

  AnyParamSurfAnalytical &Surf =.My_DeltoidWrappingPosterior.BASE_FRAME.Wrapping_1.Surf;
  AnyParamSurfAnalytical &Surf2 =..Seg.Scapula.deltoid_cyl.cyl;


  SPLine = {
    AnyMatrix InitWrapPos = {
         transf3D({0.8*.Surf.Sizes[0],0.8*.Surf.Sizes[0 ],0}, &..My_DeltoidWrappingPosterior.BASE_FRAME.Wrapping_1.Center),
         transf3D({1.1*.Surf.Sizes[0],0,0},  &..My_DeltoidWrappingPosterior.BASE_FRAME.Wrapping_1.Center),
         transf3D({0.8*.Surf.Sizes[0],-0.8*.Surf.Sizes[0],0}, &..My_DeltoidWrappingPosterior.BASE_FRAME.Wrapping_1.Center)
    };
    InitWrapPosVecArr = {&InitWrapPos};
  };

};

AnyMuscleShortestPath My_deltoideus_posterior_part_3 = {
  AnyMuscleModel &MusMdl = ..MusPar.My_deltoideus_posterior_part_3;
  AnyRefNode &Org = ..Seg.Scapula.O_deltoideus_posterior_part_3;

  AnyRefNode &Ins = ..Seg.Humerus.I_deltoideus_posterior_part_3;
  AnyDrawMuscle DrwMus = {#include "../../../../Body/AAUHuman/DrawSettings/MusDrawSettings.any"};
  SPLine.StringMesh = 40;

  AnyParamSurfAnalytical &Surf =.My_DeltoidWrappingPosterior.BASE_FRAME.Wrapping_3.Surf;
  AnyParamSurfAnalytical &Surf2 =..Seg.Scapula.deltoid_cyl.cyl;

  SPLine = {
    AnyMatrix InitWrapPos = {
         transf3D({0.8*.Surf.Sizes[0],0.8*.Surf.Sizes[0 ],0}, &..My_DeltoidWrappingPosterior.BASE_FRAME.Wrapping_3.Center),
         transf3D({1.1*.Surf.Sizes[0],0,0},  &..My_DeltoidWrappingPosterior.BASE_FRAME.Wrapping_3.Center),
         transf3D({0.8*.Surf.Sizes[0],-0.8*.Surf.Sizes[0],0}, &..My_DeltoidWrappingPosterior.BASE_FRAME.Wrapping_3.Center)
    };
    InitWrapPosVecArr = {&InitWrapPos};
  };

};


// an extra fibers a/b
AnyMuscleShortestPath My_deltoideus_posterior_part_2 = {
  AnyMuscleModel &MusMdl = ..MusPar.My_deltoideus_posterior_part_2;
  AnyRefNode &Org = ..Seg.Scapula.O_deltoideus_posterior_part_2;
  AnyRefNode &Ins = ..Seg.Humerus.I_deltoideus_posterior_part_2;
  SPLine.StringMesh = 40;
  AnyDrawMuscle DrwMus = {#include "../../../../Body/AAUHuman/DrawSettings/MusDrawSettings.any"};
  AnyParamSurfAnalytical &Surf =.My_DeltoidWrappingPosterior.BASE_FRAME.Wrapping_2.Surf;
  AnyParamSurfAnalytical &Surf2 =..Seg.Scapula.deltoid_cyl.cyl;
  SPLine = {
    AnyMatrix InitWrapPos = {
         transf3D({0.8*.Surf.Sizes[0],0.8*.Surf.Sizes[0 ],0}, &..My_DeltoidWrappingPosterior.BASE_FRAME.Wrapping_2.Center),
         transf3D({1.1*.Surf.Sizes[0],0,0},  &..My_DeltoidWrappingPosterior.BASE_FRAME.Wrapping_2.Center),
         transf3D({0.8*.Surf.Sizes[0],-0.8*.Surf.Sizes[0],0}, &..My_DeltoidWrappingPosterior.BASE_FRAME.Wrapping_2.Center)
    };
    InitWrapPosVecArr = {&InitWrapPos};
  };
};

AnyMuscleShortestPath My_deltoideus_posterior_part_4 = {
  AnyMuscleModel &MusMdl = ..MusPar.My_deltoideus_posterior_part_4;
  AnyRefNode &Org = ..Seg.Scapula.O_deltoideus_posterior_part_4;
  AnyRefNode &Ins = ..Seg.Humerus.I_deltoideus_posterior_part_4;
  SPLine.StringMesh = 40;
  AnyDrawMuscle DrwMus = {#include "../../../../Body/AAUHuman/DrawSettings/MusDrawSettings.any"};
  AnyParamSurfAnalytical &Surf =.My_DeltoidWrappingPosterior.BASE_FRAME.Wrapping_4.Surf;
  AnyParamSurfAnalytical &Surf2 =..Seg.Scapula.deltoid_cyl.cyl;

  SPLine = {
    AnyMatrix InitWrapPos = {
         transf3D({0.8*.Surf.Sizes[0],0.8*.Surf.Sizes[0 ],0}, &..My_DeltoidWrappingPosterior.BASE_FRAME.Wrapping_4.Center),
         transf3D({1.1*.Surf.Sizes[0],0,0},  &..My_DeltoidWrappingPosterior.BASE_FRAME.Wrapping_4.Center),
         transf3D({0.8*.Surf.Sizes[0],-0.8*.Surf.Sizes[0],0}, &..My_DeltoidWrappingPosterior.BASE_FRAME.Wrapping_4.Center)
    };
    InitWrapPosVecArr = {&InitWrapPos};
  };
};


}; // Mus
