AnyMatrix PointsAffine0 = {
  {0.0314794, -0.328764, 0.00191699}, // "EL"
  {0.0109095, -0.328144, -0.0114111}, // "RF"
  {0.0054091, -0.137743, 0.00808396}, // "DT"
  {0.0228099, 0.019839, -0.00926814}, // "GT1"
  {-0.0227422, 0.0235422, -0.00688546}, // "GHC"
  {-0.0350145, -0.341242, -0.00446986} // "EM1"
};


AnyMatrix PointsRBF0 = {
  {0.0314794, -0.328764, 0.00191699}, // "EL"
  {0.0244, -0.347967, -0.0110458}, // "Cap"
  {0.0125848, -0.348511, -0.00904438}, // "Tr1"
  {0.00563509, -0.349295, -0.0122113}, // "Tr2"
  {-0.00256144, -0.349896, -0.0131989}, // "Tr3"
  {-0.0095633, -0.353689, -0.0144515}, // "Tr4"
  {-0.0170794, -0.354456, -0.0155204}, // "Tr5"
  {-0.0363204, -0.336882, -0.00861389}, // "EM"
  {-0.006909, -0.329656, -0.0142331}, // "CF1"
  {-0.0223261, -0.330168, -0.0156935}, // "CF2"
  {0.0109095, -0.328144, -0.0114111}, // "RF"
  {0.0209277, -0.298234, 0.00726014}, // "LSR1"
  {-0.0192253, -0.302949, -0.00369856}, // "MLR1"
  {0.0054091, -0.137743, 0.00808396}, // "DT"
  {0.0130292, 0.00954355, -0.0306468}, // "LT1"
  {0.00552695, 0.00341826, -0.0361491}, // "LT2"
  {-0.0145938, -0.0229573, -0.0132197}, // "SN"
  {-0.0245738, -0.00474366, -0.01518}, // "AN1"
  {0.0228099, 0.019839, -0.00926814}, // "GT1"
  {0.0159192, 0.0219645, 0.00269113}, // "GT2"
  {-0.00557159, 0.0139618, 0.0125009}, // "GT3"
  {-0.0208438, 0.00669943, -0.0272042}, // "AN2"
  {-0.0141952, 0.0218218, -0.0277765}, // "AN3"
  {-0.0132557, 0.0319658, -0.0131871}, // "AN4"
  {-0.00452163, 0.0277266, 0.00533927}, // "AN5"
  {-0.0104344, 0.0126383, 0.0114087}, // "AN6"
  {-0.021032, -0.00143864, 0.00333755}, // "AN7"
  {-0.0227422, 0.0235422, -0.00688546}, // "GHC"
  {-0.00161799, -0.326359, -0.00326184}, // "OF"
  {-0.0174175, -0.352566, -0.00143355}, // "Tr5_1"
  {-0.00259712, -0.346538, -0.00121583}, // "Tr3_1"
  {0.0132885, -0.343881, 0.00548525}, // "Tr1_1"
  {-0.00830401, -0.0744422, -0.012981}, // "MLR3"
  {-0.0121162, -0.207509, -0.00619205}, // "MLR2"
  {0.00537377, -0.219613, 0.00448432}, // "LSR2"
  {0.0133515, -0.0734199, -0.00955337}, // "LSR3"
  {-0.0350145, -0.341242, -0.00446986}, // "EM1"
  {-0.00988512, -0.142694, -0.00729757} // "MLR4"
};

AnyStringArray PointsName0 = {
  "EL",
  "Cap",
  "Tr1",
  "Tr2",
  "Tr3",
  "Tr4",
  "Tr5",
  "EM",
  "CF1",
  "CF2",
  "RF",
  "LSR1",
  "MLR1",
  "DT",
  "LT1",
  "LT2",
  "SN",
  "AN1",
  "GT1",
  "GT2",
  "GT3",
  "AN2",
  "AN3",
  "AN4",
  "AN5",
  "AN6",
  "AN7",
  "GHC",
  "OF",
  "Tr5_1",
  "Tr3_1",
  "Tr1_1",
  "MLR3",
  "MLR2",
  "LSR2",
  "LSR3",
  "EM1",
  "MLR4"
};
