 AnyMatrix PointsAffine1 = {
  {-0.045691, -0.0521048, -1.29197}, // "EL"
  {-0.0392978, -0.0705954, -1.28809}, // "RF"
  {-0.0253715, -0.0533845, -1.12852}, // "DT"
  {-0.0293196, -0.0640074, -0.991931}, // "GT1"
  {0.0160361, -0.0696734, -0.990296}, // "GHC"
  {0.00286624, -0.0869767, -1.29867} // "EM1"
};

AnyMatrix PointsRBF1 = {
  {-0.045691, -0.0521048, -1.29197}, // "EL"
  {-0.0545434, -0.0680195, -1.3061}, // "Cap"
  {-0.0446258, -0.0781419, -1.30391}, // "Tr1"
  {-0.0408603, -0.0823228, -1.3063}, // "Tr2"
  {-0.0351352, -0.0867983, -1.30464}, // "Tr3"
  {-0.0282292, -0.0928191, -1.31254}, // "Tr4"
  {-0.0278108, -0.100425, -1.30662}, // "Tr5"
  {-0.0020729, -0.0940883, -1.29191}, // "EM"
  {-0.0270136, -0.083634, -1.29142}, // "CF1"
  {-0.0174061, -0.0931272, -1.28978}, // "CF2"
  {-0.0392978, -0.0705954, -1.28809}, // "RF"
  {-0.0306182, -0.0528997, -1.26927}, // "LSR1"
  {-0.0106727, -0.0810842, -1.26914}, // "MLR1"
  {-0.0253715, -0.0533845, -1.12852}, // "DT"
  {-0.0270709, -0.0742908, -1.00247}, // "LT1"
  {-0.0235772, -0.0823856, -1.00402}, // "LT2"
  {-9.16923e-05, -0.0739491, -1.03125}, // "SN"
  {0.011239, -0.0800869, -1.01896}, // "AN1"
  {-0.0293196, -0.0640074, -0.991931}, // "GT1"
  {-0.0235358, -0.0500273, -0.99243}, // "GT2"
  {0.000334613, -0.042183, -0.999087}, // "GT3"
  {-7.61604e-05, -0.0911165, -1.0068}, // "AN2"
  {-0.0103658, -0.0816106, -0.987685}, // "AN3"
  {-0.00368726, -0.0672354, -0.979058}, // "AN4"
  {0.00793312, -0.0511684, -0.986121}, // "AN5"
  {0.0176995, -0.047679, -1.0046}, // "AN6"
  {0.0208918, -0.0563559, -1.01678}, // "AN7"
  {0.0160361, -0.0696734, -0.990296}, // "GHC"
  {-0.0272227, -0.0776727, -1.28956}, // "OF"
  {-0.0142004, -0.0830183, -1.31368}, // "Tr5_1"
  {-0.0277263, -0.0784533, -1.30794}, // "Tr3_1"
  {-0.032037, -0.0655976, -1.30996}, // "Tr1_1"
  {-0.00358266, -0.0704201, -1.07572}, // "MLR3"
  {-0.00694591, -0.0727998, -1.19708}, // "MLR2"
  {-0.0200494, -0.0574808, -1.21335}, // "LSR2"
  {-0.0237921, -0.0598357, -1.06647}, // "LSR3"
  {0.00286624, -0.0869767, -1.29867}, // "EM1"
  {-0.00458914, -0.0704206, -1.13254} // "MLR4"
};
