//Morphs the original scapula stl to extend the length of the acromion in the x direction

//Scapula morphing
#define BM_SCALING _SCALING_STANDARD_

HumanModel.Scaling.GeometricalScaling = {

  #define CUSTOM_SCALING_Right_Scapula
  Right.Scapula= {
    #include "Scapula/ScalingLawScapula.any"
    AnyFunTransform3D &ScaleFunction = MyScalingLaw.MyTransform;
  };


};


////Scapula nodes showed to debug scaling
Main.HumanModel.BodyModel.Right.ShoulderArm.Seg.Scapula = {
//
//  AnyRefNode AnatomicalFrameNotTransformed = {
//    AnyDrawRefFrame drw = {
//      Visible = Off;
//      RGB = {1,1,0};
//      ScaleXYZ = {1,1,1}/15;
//    };
//  };
//
//  AnatomicalFrame.viewRefFrame ={
//    Visible = Off;
//    ScaleXYZ = {1,1,1}*3;
//    RGB = {0,0,1};
//
//  };
//
//  gh.viewRefFrame = {
//    Visible = Off;
//    RGB = {0,0,1};
//    ScaleXYZ = {1,1,1}*3;
//  };
//
//
//
//  AnyRefNode ghNotTransformed = {
//    sRel = Main.HumanModel.BodyModel.Right.ShoulderArm.Seg.Scapula.Data.gh_pos*.Mirror;
//    AnyDrawRefFrame drw={
//      Visible = Off;
//      RGB = {1,1,0};
//      ScaleXYZ = {1,1,1}/15;
//    };
//
//  };
//
//  AnyRefNode AcromionEndTransformed = {
//    sRel = .Scale({0.0410839, -0.00843409, -0.0393176});
//    AnyDrawRefFrame drw = {
//      Visible = On;
//      ScaleXYZ = {1,1,1}/15;
//      RGB = {0,0,1};
//    };
//  };
//
//
//  AnyRefNode AcromionEnd = {
//    sRel = {0.0410839, -0.00843409, -0.0393176};
//    AnyDrawRefFrame drw = {
//      Visible = On;
//      ScaleXYZ = {1,1,1}/15;
//      RGB = {1,0,0};
//    };
//  };
//
//  //Untransformed scapula
//  AnyDrawSurf DrwSurf2 = {
//    Visible = Off;
//    FileName = ...STL.FileNameScapula;
//    RGB={256,256,0}/256;
//    ScaleXYZ={1,1,1}*.Mirror;
//    //    AnyFunTransform3D& Scale = .Scale;
//    Opacity = 1;
//  };
}; // Scapula


//
//
//
//
//
//
//
