#include "libdef.any"

Main =
{

  // Body Model configuration:
  #include "Model/BodyModelConfiguration.any"


  #define acj_On 1
//  #define AcromionOffset 0.015

AnyFolder AcromionScaling = {

AnyVar AcromionOffset = 0.0;
};


//  #if AcromionOffset != 0.0
  #include "../ScalingCustom.any"
//  Main.HumanModel.BodyModel.Right.ShoulderArm.Seg.Clavicula#endif

Main.HumanModel.BodyModel.Right.ShoulderArm.Seg.Clavicula = {


};


  // Using your own Mannequin.any file in the Model folder of your model
  #include "Model\Mannequin.any"

  // Include default human model
  #include "<ANYBODY_PATH_BODY>\HumanModel.any"

  AnyFolder Model =
  {
    // A link to the human model
    AnyFolder &BodyModel = .HumanModel.BodyModel;
    AnyFolder &DefaultMannequinDrivers = .HumanModel.DefaultMannequinDrivers;

    // Environment files are used to include objects surrounding human
    #include "Model\Environment.any"

    AnyFolder ModelEnvironmentConnection =
    {
      //'JointsAndDrivers.any' file can include all kinematic constraints such as joints and drivers
      #include "Model\JointsAndDrivers.any"
      // Additional reactions which are required to run the inverse dynamics analysis
      #include "Model\Reactions.any"
    };
  };

  AnyBodyStudy Study =
  {
    AnyFolder &Model = .Model;

    Gravity={0.0, -9.81, 0.0};
    nStep = 11;
    // Overdeterminate solver is needed while using the
    // soft default mannequin drivers.
    Kinematics.SolverType = KinSolOverDeterminate;
    InitialConditions.SolverType = Kinematics.SolverType ;
  };

    #include "Model\RunAppSequence.any"
}; //Main
