AnyFileVar FileNameHumerus                         ="Bones/Humerus_bone";
AnyFileVar FileNameUlna                            ="Bones/Ulna_bone";
AnyFileVar FileNameRadius                          ="Bones/Radius_bone";
AnyFileVar FileNameWristJointSeg                   ="";
AnyFileVar FileNameScapula                         ="Bones/Scapula_bone";
AnyFileVar FileNameClavicula                       ="Bones/Clavicula_bone";
AnyFileVar FileNameHand                            ="Bones/Hand_bone";
